// SBML level 2 version 4

model Obeyesekere1999_CellCycle()
  // This model is automatically generated from the Model BIOMD0000000168 by using libsbml. According to the terms of use, this generated model is not related with Model BIOMD0000000168 any more.
  // To retrieve the curated model, please visit BioModels Database.
  // biomodels.db:BIOMD0000000168
  // isDescribedBy pubmed:17886749
  // isPartOf kegg.pathway:hsa04110
  // isVersionOf GO:0000278

  // Compartments:
  compartment cell_1 = 1;  // GO:0005623

  // Species:
  species D_1 in cell_1 = 0.1/cell_1;  // isVersionOf uniprot:P24385
  species E_1 in cell_1 = 0.6/cell_1;  // isVersionOf uniprot:P24864
  species RS_1 in cell_1 = 1/cell_1;  // hasPart uniprot:Q01094 uniprot:P06400
  species R in cell_1 = 0.5/cell_1;  // isVersionOf uniprot:P06400
  species X in cell_1 = 0.7/cell_1;
  species E2F_1 in cell_1;  // isVersionOf uniprot:Q01094
  species RP_1 in cell_1;  // isVersionOf uniprot:P06400

  // Parameters:
  aD_1 = 0.4;
  k_1 = 0.05;
  GF_1 = 6.3;
  dD_1 = 0.4;
  aE_1 = 0.16;
  af_1 = 0.9;
  theta_1 = 1.5;
  dE_1 = 0.2;
  pX_1 = 0.48;
  RT_1 = 2.5;
  pS_1 = 0.6;
  pD_1 = 0.48;
  qD_1 = 0.6;
  pE_1 = 0.096;
  qE_1 = 0.6;
  aX_1 = 0.08;
  f_1 = 0.2;
  g_1 = 0.528;
  dX_1 = 1.04;
  qX_1 = 0.8;

  // Assignment rules:
  E2F_1 := theta_1 - RS_1;
  RP_1 := RT_1 - RS_1 - R;
  unpho_RB := R + RS_1;

  // Reactions:
  _1: => D_1; aD_1*(k_1*GF_1/(1 + k_1*GF_1)); _1 is "cycD/CDK4 synthesis";  // isVersionOf GO:0006412
  cyclinCDK4degradation_1: D_1 => ; dD_1*E_1*D_1; cyclinCDK4degradation_1 is "cycD/CDK4 degradation";  // modifiers: E_1; isVersionOf GO:0008054
  cyclin_1: => E_1; aE_1*(1 + af_1*E2F_1); cyclin_1 is "cycE/CDK2 synthesis";  // modifiers: E2F_1; isVersionOf GO:0006412
  cycECDK2degradation_1: E_1 => ; dE_1*X*E_1; cycECDK2degradation_1 is "cycE/CDK2 degradation";  // modifiers: X; isVersionOf GO:0008054
  pRBpdephosphorylation_1: => R; pX_1*RP_1*X/(qX_1 + RP_1 + X); pRBpdephosphorylation_1 is "pRB-p dephosphorilation";  // modifiers: RP_1, X; isVersionOf GO:0016311
  pRBE2Fcomplexassociation_1: R => RS_1; pS_1*E2F_1*R; pRBE2Fcomplexassociation_1 is "pRB/E2F complex association";  // modifiers: E2F_1; isVersionOf GO:0006461
  pRBE2FcomplexdeassociationviacycDCDK4_1: RS_1 => ; pD_1*RS_1*D_1/(qD_1 + RS_1 + D_1); pRBE2FcomplexdeassociationviacycDCDK4_1 is "pRB/E2F complex deassociation via cycD/CDK4";  // modifiers: D_1; isVersionOf GO:0043624
  _7: RS_1 => ; pE_1*RS_1*E_1/(qE_1 + RS_1 + E_1); _7 is "pRB/E2F complex deassociation via cycE/CDK2";  // modifiers: E_1; isVersionOf GO:0043624
  cycleprogression_1: => X; aX_1*E_1 + f_1*E2F_1 + g_1*X^2*E_1; cycleprogression_1 is "cycle progression";  // modifiers: E_1, E2F_1; isVersionOf GO:0051726
  cyclebreak_1: X => ; dX_1*X; cyclebreak_1 is "cycle break";  // isVersionOf GO:0051726
end
